<?xml version="1.0" encoding="utf-8" ?>
<?xml-stylesheet type="text/xsl" href="http://jsbsim.sourceforge.net/JSBSim.xsl"?>
<fdm_config name="extra500" version="2.0" release="ALPHA"
xmlns:xsi="http://www.w3.org/2001/XMLSchema-instance"
	xsi:noNamespaceSchemaLocation="http://jsbsim.sourceforge.net/JSBSim.xsd">

<!--
    This file is part of extra500

    The extra500 is free software: you can redistribute it and/or modify
    it under the terms of the GNU General Public License as published by
    the Free Software Foundation, either version 2 of the License, or
    (at your option) any later version.

    The extra500 is distributed in the hope that it will be useful,
    but WITHOUT ANY WARRANTY; without even the implied warranty of
    MERCHANTABILITY or FITNESS FOR A PARTICULAR PURPOSE.  See the
    GNU General Public License for more details.

    You should have received a copy of the GNU General Public License
    along with extra500.  If not, see <http://www.gnu.org/licenses/>.

      Author: -
      Date: 2013-03-13

      Last change:      Eric van den Berg
      Date:             22.05.13
-->

	<fileheader>
		<author> Aeromatic v 0.95 </author>
		<filecreationdate>2013-03-13</filecreationdate>
		<version>$Revision: 0.0.1 $</version>
		<description> Models a extra500. </description>
	</fileheader>

	<metrics>
		<wingarea  unit="M2">  14.025 </wingarea>
		<wingspan  unit="M" >  11.0 </wingspan>
		<wing_incidence>        2.00 </wing_incidence>
		<chord     unit="M" >   1.322 </chord>
		<htailarea unit="M2">   2.812 </htailarea>
		<htailarm  unit="M" >   5.562 </htailarm>
		<vtailarea unit="M2">   2.735 </vtailarea>
		<vtailarm  unit="M" >   4.736 </vtailarm>
		<location name="AERORP" unit="M">
			<x> 3.53 </x>
			<y> 0.00 </y>
			<z> 1.65 </z>
		</location>
		<location name="EYEPOINT" unit="IN">
			<x>  45.393 </x>
			<y> -26.00 </y>
			<z>  80 </z>
		</location>
		<location name="VRP" unit="M">
			<x>3.146</x>
			<y>0</y>
			<z>1.98</z>
		</location>
	</metrics>

	<mass_balance>
		<documentation>
			The Center of Gravity location, empty weight, in aircraft's own
			structural coord system.
		</documentation>

		<!--
			max weight 		:	2130	KG
			max emtpy		:	1445	KG
			max fuel		:	553.3	KG
			max pax			:	500	KG
		-->

		<ixx unit="SLUG*FT2">      2891 </ixx>
		<iyy unit="SLUG*FT2">      3919 </iyy>
		<izz unit="SLUG*FT2">      6136 </izz>
		<emptywt unit="KG" >      1385 </emptywt>  		<!-- subtracted main gear, find below as pointmasses -->
		<location name="CG" unit="M">
			<x> 3.4995 </x>
			<y> 0.00 </y>
			<z> 1.659 </z>
		</location>
		<pointmass name="Pilot">
			<weight unit="KG"> 80 </weight>
			<location name="POINTMASS" unit="M">
				<x> 2.977 </x>
				<y> -0.42 </y>
				<z> 1.8 </z>
			</location>
		</pointmass>
		<pointmass name="Co-Pilot">
			<weight unit="KG"> 80 </weight>
			<location name="POINTMASS" unit="M">
				<x> 2.977 </x>
				<y> 0.42 </y>
				<z> 1.8 </z>
			</location>
		</pointmass>
		<pointmass name="Row 1 Left Passenger">
			<weight unit="KG"> 0 </weight>
			<location name="POINTMASS" unit="M">
				<x> 3.93 </x>
				<y> -0.42 </y>
				<z> 1.80 </z>
			</location>
		</pointmass>
		<pointmass name="Row 1 Right Passenger">
			<weight unit="KG"> 0 </weight>
			<location name="POINTMASS" unit="M">
				<x> 3.93 </x>
				<y> 0.42 </y>
				<z> 1.80 </z>
			</location>
		</pointmass>
		<pointmass name="Row 2 Left Passenger">
			<weight unit="KG"> 0 </weight>
			<location name="POINTMASS" unit="M">
				<x> 5.05 </x>
				<y> -0.35 </y>
				<z> 1.80 </z>
			</location>
		</pointmass>
		<pointmass name="Row 2 Right Passenger">
			<weight unit="KG"> 0 </weight>
			<location name="POINTMASS" unit="M">
				<x> 5.05 </x>
				<y> 0.35 </y>
				<z> 1.80 </z>
			</location>
		</pointmass>
		<pointmass name="Baggage">
			<weight unit="KG"> 0 </weight>  <!--max 90kg -->
			<location name="POINTMASS" unit="M">
				<x> 5.75 </x>
				<y>  0 </y>
				<z> 1.6 </z>
			</location>
		</pointmass>
		<pointmass name="LMainGear">
			<weight unit="KG"> 30 </weight>
			<location name="POINTMASS" unit="M">
				<x> 4.233 </x>				<!--TBD: moves 0.5 m forward when retracted -->
				<y>  -0.5 </y>
				<z> 0.6 </z>				<!--TBD: moves 0.3 m up when retracted -->
			</location>
		</pointmass>
		<pointmass name="RMainGear">
			<weight unit="KG"> 30 </weight>
			<location name="POINTMASS" unit="M">
				<x> 4.233 </x>				<!--TBD: moves 0.5 m forward when retracted -->
				<y>  0.5 </y>
				<z> 0.6 </z>				<!--TBD: moves 0.3 m up when retracted -->
			</location>
		</pointmass>
	</mass_balance>

	<ground_reactions>

		<contact type="BOGEY" name="NOSE">
			<location unit="M">
				<x>  1.415 </x>
				<y>  0.00 </y>
				<z>  0.146 </z>
			</location>
			<static_friction>  0.60 </static_friction>
			<dynamic_friction> 0.40 </dynamic_friction>
			<rolling_friction> 0.03 </rolling_friction>
			<spring_coeff unit="N/M">        40000 </spring_coeff>
			<damping_coeff unit="N/M/SEC">  34271.30 </damping_coeff>
			<max_steer unit="DEG"> 30 </max_steer>
			<brake_group>NONE</brake_group>
			<retractable>1</retractable>
		</contact>

		<contact type="BOGEY" name="LEFT_MAIN">
			<location unit="M">
				<x> 4.233 </x>
				<y> -1.06 </y>
				<z> 0.21 </z>
			</location>
			<static_friction>  0.60 </static_friction>
			<dynamic_friction> 0.40 </dynamic_friction>
			<rolling_friction> 0.03 </rolling_friction>
			<spring_coeff unit="N/M">        183000 </spring_coeff>
			<damping_coeff unit="N/M/SEC">  34271.30 </damping_coeff>
			<max_steer unit="DEG">0</max_steer>
			<brake_group>LEFT</brake_group>
			<retractable>1</retractable>
		</contact>

		<contact type="BOGEY" name="RIGHT_MAIN">
			<location unit="M">
				<x> 4.233 </x>
				<y>  1.06 </y>
				<z> 0.210 </z>
			</location>
			<static_friction>  0.60 </static_friction>
			<dynamic_friction> 0.40 </dynamic_friction>
			<rolling_friction> 0.03 </rolling_friction>
			<spring_coeff unit="N/M">        183000 </spring_coeff>
			<damping_coeff unit="N/M/SEC">  34271.30 </damping_coeff>
			<max_steer unit="DEG">0</max_steer>
			<brake_group>RIGHT</brake_group>
			<retractable>1</retractable>
		</contact>

		<contact type="STRUCTURE" name="LEFT_WING">
			<location unit="M">
				<x> 4.5 </x>
				<y> -5.8 </y>
				<z>  2.2 </z>
			</location>
			<static_friction>  1.00 </static_friction>
			<dynamic_friction> 1.00 </dynamic_friction>
			<spring_coeff unit="LBS/FT">   1830 </spring_coeff>
			<damping_coeff unit="LBS/FT/SEC">  183 </damping_coeff>
		</contact>

		<contact type="STRUCTURE" name="RIGHT_WING">
			<location unit="M">
				<x> 4.5 </x>
				<y>  5.8 </y>
				<z>  2.2 </z>
			</location>
			<static_friction>  1.00 </static_friction>
			<dynamic_friction> 1.00 </dynamic_friction>
			<spring_coeff unit="LBS/FT">1830 </spring_coeff>
			<damping_coeff unit="LBS/FT/SEC">183</damping_coeff>
		</contact>

		<contact type="STRUCTURE" name="NOSE">
			<location unit="M">
				<x> 1.0 </x>
				<y> 0 </y>
				<z> 0.99 </z>
			</location>
			<static_friction>  1.00 </static_friction>
			<dynamic_friction> 1.00 </dynamic_friction>
			<spring_coeff unit="LBS/FT">10000</spring_coeff>
			<damping_coeff unit="LBS/FT/SEC">1000</damping_coeff>
		</contact>

		<contact type="STRUCTURE" name="BELLEY">
			<location unit="M">
				<x> 3.5 </x>
				<y> 0 </y>
				<z> 0.57 </z>
			</location>
			<static_friction>  1.00 </static_friction>
			<dynamic_friction> 1.00 </dynamic_friction>
			<spring_coeff unit="LBS/FT">10000</spring_coeff>
			<damping_coeff unit="LBS/FT/SEC">1000</damping_coeff>
		</contact>

		<contact type="STRUCTURE" name="VENTRAL FIN">
			<location unit="M">
				<x> 8.795 </x>
				<y> 0 </y>
				<z> 1.229 </z>
			</location>
			<static_friction>  1.00 </static_friction>
			<dynamic_friction> 1.00 </dynamic_friction>
			<spring_coeff unit="LBS/FT">1830</spring_coeff>
			<damping_coeff unit="LBS/FT/SEC">183</damping_coeff>
		</contact>

	</ground_reactions>

	<propulsion>
		<engine file="turbine_250-B17F2">
			<location unit="IN">
				<x>   9.00 </x>
				<y>   0.00 </y>
				<z>   59.00 </z>
			</location>
			<orient unit="DEG">
				<pitch> -3.00 </pitch>
				<roll>  0.00 </roll>
				<yaw>   0.00 </yaw>
			</orient>
			<feed>3</feed>
			<thruster file="propeller_MTV-5-1-D-C-F-R(A)">
				<location unit="IN">
					<x>  9.00 </x>
					<y>   0.00 </y>
					<z>   59.00 </z>
				</location>
				<orient unit="DEG">
					<pitch> -3.0 </pitch>
					<roll>  0.00 </roll>
					<yaw>   0.00 </yaw>
				</orient>
			</thruster>
		</engine>
		<!--
			Tank
			collector + main + auxiliary = 553.3 KG
		-->
		<tank type="FUEL" number="0">
			<!-- left auxiliary compartment -->
			<location unit="M">
				<x>  3.9 </x>
				<y> -3.576 </y>
				<z>  2.357 </z>
			</location>
			<priority> 0 </priority>
			<type>JET-A</type>
			<capacity unit="KG"> 86.3 </capacity>
			<contents unit="KG"> 0.0 </contents>
		</tank>
		<tank type="FUEL" number="1">
			<!-- left main compartment -->
			<location unit="M">
				<x>  3.768 </x>
				<y> -1.787 </y>
				<z>  2.357 </z>
			</location>
			<priority> 0 </priority>
			<type>JET-A</type>
			<capacity unit="KG"> 160.0 </capacity>
			<contents unit="KG"> 160.0 </contents>
		</tank>
		<tank type="FUEL" number="2">
			<!-- left collector compartment -->
			<location unit="M">
				<x>  3.768 </x>
				<y> -0.625 </y>
				<z>  2.357 </z>
			</location>
			<priority> 0 </priority>
			<type>JET-A</type>
			<capacity unit="KG"> 30.4 </capacity>
			<contents unit="KG"> 30.4 </contents>
		</tank>
		<tank type="FUEL" number="3">
			<!-- Engine collector pipeline -->
			<location unit="M">
				<x> 0.4 </x>
				<y>   0.0 </y>
				<z>  0.0 </z>
			</location>
			<priority> 1 </priority>
			<type>JET-A</type>
			<capacity unit="KG"> 0.25 </capacity>
			<contents unit="KG"> 0.25 </contents>
		</tank>
		<tank type="FUEL" number="4">
			<!-- right collector compartment -->
			<location unit="M">
				<x>  3.768 </x>
				<y>  0.625 </y>
				<z>  2.357 </z>
			</location>
			<priority> 0 </priority>
			<type>JET-A</type>
			<capacity unit="KG"> 30.4 </capacity>
			<contents unit="KG"> 30.4 </contents>
		</tank>
		<tank type="FUEL" number="5">
			<!-- right main compartment -->
			<location unit="M">
				<x>  3.768 </x>
				<y>  1.787 </y>
				<z>  2.357 </z>
			</location>
			<priority> 0 </priority>
			<type>JET-A</type>
			<capacity unit="KG"> 160.0 </capacity>
			<contents unit="KG"> 160.0 </contents>
		</tank>
		<tank type="FUEL" number="6">
			<!-- right auxiliary compartment -->
			<location unit="M">
				<x>  3.9 </x>
				<y>  3.576 </y>
				<z>  2.357 </z>
			</location>
			<priority> 0 </priority>
			<type>JET-A</type>
			<capacity unit="KG"> 86.3 </capacity>
			<contents unit="KG"> 0.0 </contents>
		</tank>
	</propulsion>

<autopilot name="STEC55X">

	<channel name="accelsensor">
		<accelerometer name="/autopilot/accsens-channel/ap-z-accelsensor">
			<location unit="M">
				<x>1.1</x>
				<y>0.0</y>
				<z>0.0</z>
			</location>
  			<orientation unit="DEG">
    				<pitch>0.0</pitch>
    				<roll>0.0</roll>
    				<yaw>0.0</yaw>
  			</orientation>
			<axis>Z</axis>
			<gain>0.0310809970784</gain>	<!--1/32.174 -->
			<output>/autopilot/accsens-channel/ap-z-accel</output>
		</accelerometer>

		<pid name="/autopilot/accsens-channel/accel-rate">
			<input>/autopilot/accsens-channel/ap-z-accel</input>
			<kp>0.0</kp>
			<ki>0.0</ki>
			<kd>1.0</kd>
		</pid>

	</channel>


	<channel name="heading">
		<pure_gain name="/autopilot/hdg-channel/lmd-hdg-error">
			<input>/instrumentation/heading-indicator-IFD-LH/heading-bug-error-deg</input>
			<gain>1.0</gain>
			<clipto>
				<min>-20</min>
				<max>20</max>
			</clipto>
		</pure_gain>

		<pid name="/autopilot/hdg-channel/target-turn-rate">
			<input>/autopilot/hdg-channel/lmd-hdg-error</input>
			<kp>/autopilot/hdg-channel/lmd-hdg-error-kp</kp>							<!--180deg/min devided by 25deg -->
			<ki>/autopilot/hdg-channel/lmd-hdg-error-ki</ki>
			<kd>/autopilot/hdg-channel/lmd-hdg-error-kd</kd>
		</pid>

		<fcs_function name="/autopilot/hdg-channel/turn-rate-inv">
			<function>
				<product>
					<value>-180.0</value>
					<property>/instrumentation/turn-indicator/indicated-turn-rate</property>  <!--pos right-->
				</product>
			</function>
		</fcs_function>

		<fcs_function name="/autopilot/hdg-channel/turn-rate-error">
			<function>
				<sum>
					<property>/autopilot/hdg-channel/target-turn-rate</property>
					<property>/autopilot/hdg-channel/turn-rate-inv</property>
				</sum>
			</function>
		</fcs_function>

		<pid name="/autopilot/hdg-channel/cmd-ail-change">
			<input>/autopilot/hdg-channel/turn-rate-error</input>
			<kp>/autopilot/hdg-channel/turn-rate-error-kp</kp>
			<ki>/autopilot/hdg-channel/turn-rate-error-ki</ki>
			<kd>/autopilot/hdg-channel/turn-rate-error-kd</kd>
		</pid>

		<fcs_function name="/autopilot/hdg-channel/cmd-ap-ail-pos-norm-raw">
			<function>
				<sum>
					<property>fcs/aileron-cmd-tot</property>
					<product>
                                  		<property>/autopilot/mode/heading</property>
						<value>1.0</value>
						<property>/autopilot/hdg-channel/cmd-ail-change</property>
						<property>sim-dt-sec</property>
					</product>
				</sum>
			</function>
			<output>/autopilot/hdg-channel/cmd-ap-ail-pos-norm-raw</output>
		</fcs_function>

		<actuator name="/autopilot/hdg-channel/ail-servo">
			<input>/autopilot/hdg-channel/cmd-ap-ail-pos-norm-raw</input>
			<rate_limit>0.2</rate_limit>
			<clipto>
				<min>-1</min>
				<max>1</max>
			</clipto>
			<output>/autopilot/hdg-channel/cmd-ap-ail-pos-norm</output>
		</actuator>


	</channel>

	<channel name="verticalspeed">

		<fcs_function name="/autopilot/vs-channel/vs-error-fpm">
			<function>
				<sum>
					<property>/autopilot/settings/vertical-speed-fpm</property>
					<product>
						<value>-1.0</value>
						<property>/instrumentation/ivsi-IFD-LH/indicated-speed-fpm</property>
					</product>
				</sum>
			</function>
		</fcs_function>

		<pid name="/autopilot/vs-channel/target-pitch-error">
			<input>/autopilot/vs-channel/vs-error-fpm</input>
			<kp>/autopilot/vs-channel/vs-error-kp</kp>
			<ki>/autopilot/vs-channel/vs-error-ki</ki>
			<kd>/autopilot/vs-channel/vs-error-kd</kd>
		</pid>


		<fcs_function name="/autopilot/vs-channel/pitch-error">
			<function>
				<product>
					<property>/autopilot/vs-channel/pitch-error-gain</property>
					<sum>
						<property>/autopilot/vs-channel/target-pitch-error</property>
						<product>
							<property>/autopilot/vs-channel/accel-rate-gain</property>
							<property>/autopilot/accsens-channel/accel-rate</property>
						</product>
					</sum>
				</product>
			</function>
		</fcs_function>

		<fcs_function name="/autopilot/vs-channel/cmd-ap-elev-pos-norm-raw">
			<function>
				<sum>
					<property>fcs/elevator-cmd-tot</property>
					<product>
                                  		<property>/autopilot/mode/vs</property>
						<value>1.0</value>
						<property>/autopilot/vs-channel/pitch-error</property>
						<property>sim-dt-sec</property>
					</product>
				</sum>
			</function>
			<output>/autopilot/vs-channel/cmd-ap-elev-pos-norm-raw</output>
		</fcs_function>

		<actuator name="/autopilot/vs-channel/pitch-servo">
			<input>/autopilot/vs-channel/cmd-ap-elev-pos-norm-raw</input>
			<rate_limit>0.2</rate_limit>
			<clipto>
				<min>-1</min>
				<max>1</max>
			</clipto>
			<output>/autopilot/vs-channel/cmd-ap-elev-pos-norm</output>
		</actuator>

	</channel>


</autopilot>


<flight_control name="FCS: extra500">
	 <channel name="Pitch">

			<fcs_function name="elevator-cmd-tot-nc">
				<function>
				<sum>
					<product>
						<abs>
                               				<sum>
								<product>
                                  					<property>/autopilot/mode/vs</property>
								</product>
                                  				<value>-1</value>
                              				</sum>
                         			</abs>
						<sum>
							<property>fcs/elevator-cmd-norm</property>
						</sum>
					</product>
					<product>
                                  		<property>/autopilot/mode/vs</property>
                              			<property>/autopilot/vs-channel/cmd-ap-elev-pos-norm</property>
					</product>
				</sum>
				</function>
			</fcs_function>

			 <summer name="elevator-cmd-tot">
                		<input>fcs/elevator-cmd-tot-nc</input>
                		<clipto>
                    			<min>-1</min>
                    			<max>1</max>
               			 </clipto>
            		</summer>


      <aerosurface_scale name="Elevator Control">
	      <input>fcs/elevator-cmd-tot</input>
	      <range>
                  <min>-0.5759 </min>
                  <max> 0.3141 </max>
	      </range>
	      <output>fcs/elevator-pos-rad</output>
      </aerosurface_scale>

   <aerosurface_scale name="elevator normalization">
      <input>fcs/elevator-pos-rad</input>
      <domain>
        <min> -0.5759 </min>
        <max>  0.3141 </max>
      </domain>
      <range>
        <min> -1 </min>
        <max>  1 </max>
      </range>
      <output>fcs/elevator-pos-norm</output>
   </aerosurface_scale>

    <summer name="aircraft/hstab/elevator/d_e_free-clipped-rad">
      <description>stick-free elevator deflection rad</description>
      <input>aircraft/hstab/elevator/d_e_free-rad</input>
      <clipto>
            <min>
                  <property>aircraft/hstab/elevator/min-defl-rad</property>
            </min>
            <max>
                  <property>aircraft/hstab/elevator/max-defl-rad</property>
            </max>
      </clipto>
    </summer>

  </channel>

  <channel name="Pitch trim">

      <aerosurface_scale name="Pitch trim Control">
	      <input>fcs/pitch-trim-cmd-norm</input>
	      <range>
                  <min> -30 </min>
                  <max>  20 </max>
	      </range>
	      <output>fcs/pitch-trim-pos-deg</output>
      </aerosurface_scale>

  </channel>


		<channel name="Roll">

			<aerosurface_scale name="rudder aileron control"> 	<!-- this is to simulate the rudder-aileron interconnect, a spring in RL -->
				<input>fcs/rudder-cmd-norm</input>
				<range>
					<min> 0.15 </min>
					<max>-0.15 </max>
				</range>
				<output>fcs/rudder-cmd-aileron</output>
			</aerosurface_scale>

			<fcs_function name="aileron-cmd-tot-nc">
				<function>
				<sum>
					<product>
						<abs>
                               				<sum>
								<product>
                                  					<property>/autopilot/mode/heading</property>
								</product>
                                  				<value>-1</value>
                              				</sum>
                         			</abs>
						<abs>
                               				<sum>
								<product>
                                  					<property>/autopilot/mode/nav</property>
								</product>
                                  				<value>-1</value>
                              				</sum>
                         			</abs>
						<sum>
							<property>fcs/rudder-cmd-aileron</property>
							<property>fcs/aileron-cmd-norm</property>
						</sum>
					</product>
					<product>
                                  		<property>/autopilot/mode/heading</property>
                              			<property>/autopilot/hdg-channel/cmd-ap-ail-pos-norm</property>
					</product>
				</sum>
				</function>
			</fcs_function>

			 <summer name="aileron-cmd-tot">
                		<input>fcs/aileron-cmd-tot-nc</input>
                		<clipto>
                    			<min>-1</min>
                    			<max>1</max>
               			 </clipto>
            		</summer>

			<aerosurface_scale name="Left Aileron Control">
				<input>fcs/aileron-cmd-tot</input>
				<range>
					<min> -0.4712 </min>
					<max>  0.3316 </max>
				</range>
				<output>fcs/left-aileron-pos-rad</output>
			</aerosurface_scale>

			<aerosurface_scale name="Right Aileron Control">
				<input>fcs/aileron-cmd-tot</input>
				<range>
					<min> -0.3316 </min>
					<max>  0.4712 </max>
				</range>
				<output>fcs/right-aileron-pos-rad</output>
			</aerosurface_scale>

			<aerosurface_scale name="left aileron normalization">
				<input>fcs/left-aileron-pos-rad</input>
				<domain>
					<min> -0.4712 </min>
					<max>  0.3316 </max>
				</domain>
				<range>
					<min> -1 </min>
					<max>  1 </max>
				</range>
				<output>fcs/left-aileron-pos-norm</output>
			</aerosurface_scale>

			<aerosurface_scale name="right aileron normalization">
				<input>fcs/right-aileron-pos-rad</input>
				<domain>
					<min> -0.3316 </min>
					<max>  0.4712 </max>
				</domain>
				<range>
					<min> -1 </min>
					<max>  1 </max>
				</range>
				<output>fcs/right-aileron-pos-norm</output>
			</aerosurface_scale>

		</channel>

		<property value="1">fcs/yaw-damper-enable</property>
		<channel name="Yaw">

			<aerosurface_scale name="aileron rudder control">	<!-- this is to simulate the rudder-aileron interconnect, a spring in RL -->
				<input>fcs/aileron-cmd-norm</input>
				<range>
					<min> 0.1 </min>
					<max>-0.1 </max>
				</range>
				<output>fcs/aileron-cmd-rudder</output>
			</aerosurface_scale>

			 <summer name="rudder-cmd-tot">
                		<input>fcs/aileron-cmd-rudder</input>
                		<input>fcs/rudder-cmd-norm</input>
                		<clipto>
                    			<min>-1</min>
                    			<max>1</max>
               			 </clipto>
            		</summer>

			<aerosurface_scale name="Rudder Control">
				<input>fcs/rudder-cmd-tot</input>
				<range>
					<min> -0.4363 </min>
					<max>  0.4363 </max>
				</range>
				<output>fcs/rudder-pos-rad</output>
			</aerosurface_scale>

			<aerosurface_scale name="rudder normalization">
				<input>fcs/rudder-pos-rad</input>
				<domain>
					<min> -0.4363 </min>
					<max>  0.4363 </max>
				</domain>
				<range>
					<min> -1 </min>
					<max>  1 </max>
				</range>
				<output>fcs/rudder-pos-norm</output>
			</aerosurface_scale>

		</channel>

		<channel name="Flaps">

			<kinematic name="Flaps Control">
				<input>fcs/flap-wp-cmd-norm</input>
				<traverse>
					<setting>
						<position>0</position>
						<time>0</time>
					</setting>
					<setting>
						<position>15</position>
						<time>4</time>
					</setting>
					<setting>
						<position>30</position>
						<time>6</time>
					</setting>
				</traverse>
				<output>fcs/flap-pos-deg</output>
			</kinematic>

			<kinematic name="Flaps Control aero">
                  <!--this is for the aerodynamic part of the flap deflection. Much slower to prevent dynamic effects-->
				<input>fcs/flap-wp-cmd-norm</input>
				<traverse>
					<setting>
						<position>0</position>
						<time>0</time>
					</setting>
					<setting>
						<position>15</position>
						<time>6</time>
					</setting>
					<setting>
						<position>30</position>
						<time>9</time>
					</setting>
				</traverse>
				<output>fcs/flap-aero-pos-deg</output>
			</kinematic>

			<aerosurface_scale name="Flap Normalization">
				<input>fcs/flap-pos-deg</input>
				<domain>
					<min>0</min>
					<max>30</max>
				</domain>
				<range>
					<min>0</min>
					<max>1</max>
				</range>
				<output>fcs/flap-pos-norm</output>
			</aerosurface_scale>

		</channel>

		<channel name="Landing Gear">
			<kinematic name="Gear Control">
				<input>gear/gear-cmd-norm</input>
				<traverse>
					<setting>
						<position> 0 </position>
						<time>     0 </time>
					</setting>
					<setting>
						<position> 1 </position>
						<time>     13 </time>
					</setting>
				</traverse>
				<output>gear/gear-pos-norm</output>
			</kinematic>

		</channel>

</flight_control>

<system name="indication">

	<channel name="fuel pressure">
		<lag_filter name ="aircraft/engine/FP-psi">
 			<input>aircraft/engine/FPtarget-psi</input>
			<c1>1.0</c1>
		</lag_filter>
	</channel>

	<channel name="TOT">
		<lag_filter name ="aircraft/engine/TOT-degC">
 			<input>aircraft/engine/TOT-target-degC</input>
			<c1>1.0</c1>
		</lag_filter>
	</channel>

	<channel name="OT">
		<lag_filter name ="aircraft/engine/OT-degC">
 			<input>aircraft/engine/OT-target-degC</input>
			<c1>1.0</c1>
		</lag_filter>
	</channel>

<!--AIRSPEED ANTI-CALIBRATION-->
	<channel name="airspeed">
		<fcs_function name="/instrumentation/airspeed-IFD-LH/indicated-airspeed-kt">
			<function>
       			<description>Calibrated to indicated airspeed</description>
       				<table>
            				<independentVar lookup="row">/instrumentation/airspeed-IFD-LH/indicated-speed-kt</independentVar>
            				<independentVar lookup="column">fcs/flap-aero-pos-deg</independentVar>
            				<tableData>
						0	15	30
					0	0	0	0
					55	58	54	51
					60	62.2	59	57.5
					70	72	69.5	68
					80	80.5	79.7	69
					90	90.1	89.8	89.5
					100	100	100	99
					110	109.5	110	108
					120	119	120	120
					130	128.5	130	130
					140	138	140	140
					210	208	210	210
					222	220	222	222
					260	258	260	260
            				</tableData>
      				</table>
    			</function>
		</fcs_function>

		<fcs_function name="/instrumentation/airspeed-IFD-RH/indicated-airspeed-kt">
			<function>
       			<description>Calibrated to indicated airspeed</description>
       				<table>
            				<independentVar lookup="row">/instrumentation/airspeed-IFD-RH/indicated-speed-kt</independentVar>
            				<independentVar lookup="column">fcs/flap-aero-pos-deg</independentVar>
            				<tableData>
						0	15	30
					0	0	0	0
					55	58	54	51
					60	62.2	59	57.5
					70	72	69.5	68
					80	80.5	79.7	69
					90	90.1	89.8	89.5
					100	100	100	99
					110	109.5	110	108
					120	119	120	120
					130	128.5	130	130
					140	138	140	140
					210	208	210	210
					222	220	222	222
					260	258	260	260
            				</tableData>
      				</table>
    			</function>
		</fcs_function>

		<fcs_function name="/instrumentation/airspeed-backup/indicated-airspeed-kt">
			<function>
       			<description>Calibrated to indicated airspeed</description>
       				<table>
            				<independentVar lookup="row">/instrumentation/airspeed-backup/indicated-speed-kt</independentVar>
            				<independentVar lookup="column">fcs/flap-aero-pos-deg</independentVar>
            				<tableData>
						0	15	30
					0	0	0	0
					55	58	54	51
					60	62.2	59	57.5
					70	72	69.5	68
					80	80.5	79.7	69
					90	90.1	89.8	89.5
					100	100	100	99
					110	109.5	110	108
					120	119	120	120
					130	128.5	130	130
					140	138	140	140
					210	208	210	210
					222	220	222	222
					260	258	260	260
            				</tableData>
      				</table>
    			</function>
		</fcs_function>
	</channel>
</system>

<system name="stall-warning">
	<channel name="stall warner">
		<fcs_function name="aircraft/stallwarner/alpha-stall-warn">
			<function>
 				<table>
            				<independentVar lookup="row">fcs/flap-aero-pos-deg</independentVar>
            				<tableData>
					0	11.5
					15	10.0
					30	11.0
					</tableData>
				</table>
			</function>
		</fcs_function>

		<switch name="stallwarning">
			<default value="0"/>
			<test value="1">
				aircraft/wing/alpha-deg ge aircraft/stallwarner/alpha-stall-warn
			</test>
			<output>aircraft/stallwarner/state</output>
		</switch>

	</channel>
</system>

<aerodynamics>


<!--GENERAL STUFF -->

    <function name="sim-dt-sec">
	<sum>
		<property>sim-time-sec</property>
		<property>sim-time-sec-old</property>
	</sum>
    </function>

    <function name="atmosphere/T-degC">
	<sum>
		<product>
      			<property>atmosphere/T-R</property>
			<property>/extra500/const/RANKINE2KELVIN</property>
		</product>
	<value>-273.15</value>
	</sum>
    </function>


<!-- ENGINE -->

    <function name="aircraft/engine/TRQ-perc">
      <description>Indicated TRQ in percent</description>
	<product>
		<property>/extra500/instrumentation/EIP/state</property>   <!--to make sure pointer is at 0 when unit is off -->
		<max>
			<value>0</value>			<!-- preventing TRQ below 0 -->
			<product>
				<property>propulsion/engine/power-hp</property>
				<value>493.797</value>
				<pow>
					<max>			<!-- preventing devision by 0 -->
						<property>propulsion/engine/propeller-rpm</property>
						<value>10</value>
					</max>
					<value>-1</value>
				</pow>
			</product>
		</max>
	</product>
    </function>

    <function name="aircraft/engine/TOTr-degC">
       <description>Indicated TOT when eng running</description>
       <table>
            <independentVar lookup="row">atmosphere/rho-slugs_ft3</independentVar>
            <independentVar lookup="column">aircraft/engine/TRQ-perc</independentVar>
            <tableData>
				0	20	40	60	80	90	100	120	140
		0.00097016	590	650	710	800	915	985	1020	1140	1250
		0.0014552	580	605	620	680	775	810	880	980	1080
		0.0019403	576	595	605	630	655	700	745	835	925
		0.0025224	550	570	590	600	605	610	640	710	795
            </tableData>
      </table>
    </function>

    <function name="aircraft/engine/Delta-TOTsd-degC">
       <description>TOT change when spooling down</description>
	<product>
		<property>aircraft/engine/dt-indication</property>
		<value>0.00015</value>
		<pow>
			<max>
				<value>0.1</value>
				<property>propulsion/engine/n1</property>
			</max>
			<value>2</value>
		</pow>
		<sum>
			<property>aircraft/engine/TOT-target-degC</property>
			<product>
				<value>-1</value>
				<property>aircraft/engine/OT-target-degC</property>
			</product>
		</sum>
	</product>
    </function>

    <function name="aircraft/engine/Delta-OT-degC">
       <description>Oil temp change</description>
	 <product>
		<property>aircraft/engine/dt-indication</property>
		<table>
            		<independentVar lookup="row">propulsion/engine/power-hp</independentVar>
            		<independentVar lookup="column">aircraft/engine/OT-degC</independentVar> 	<!-- to simulate the thermostat in the oil cooler-->
            		<tableData>
				-54		50		60		70	76	82
			0	-0.01		-0.01		-0.015		-0.02	-0.02	-0.02
			35	1.242		1.242		0.9		0.2	0.05	0
			380	1.8417		1.8417		0.6		0.3	0.07	0
			458	2.0707		2.0707		1.0		0.5	0.08	0
            		</tableData>
      		</table>
	</product>
    </function>

    <function name="aircraft/engine/OP-psi">
       <description>Indicated Oil Pressure</description>
	<product>
		<property>/extra500/instrumentation/EIP/state</property>   <!--to make sure pointer is at 0 when unit is off -->
	 	<sum>
			<property>aircraft/engine/OP-maxsetting-psi</property>
			<value>-125</value>
       			<table>
            			<independentVar lookup="row">propulsion/engine/n1</independentVar>
				<independentVar lookup="column">aircraft/engine/OT-degC</independentVar>	<!-- oil pressure dependence on oil temperature-->
            			<tableData>
						0	25	82
					0	0	0	0
					12	0	0	0
					21	30	20	15
					26	63	46	40
					42	135	123	48
					60	139	135	60
					70	143	140	100
					72.5	147	145	116
					75	149	147	119
					80	151	150	122
					90	154	153	124
					100	155	154	125
					110	156	155	125
            			</tableData>
      			</table>
		</sum>
	</product>
    </function>

    <function name="aircraft/engine/n2">
       <description>Indicated Oil Pressure</description>
	<product>
		<property>/extra500/instrumentation/EIP/state</property>   <!--to make sure pointer is at 0 when unit is off -->
		<property>propulsion/engine/propeller-rpm</property>
	</product>
    </function>

    <function name="aircraft/engine/FPtarget-psi">
       <description>Indicated Fuel Pressure</description>
	 	<product>
			<max>
				<property>aircraft/fuel/fuel-pump1</property>
				<property>aircraft/fuel/fuel-pump2</property>
			</max>
			<table>
            			<independentVar lookup="row">atmosphere/pressure-altitude</independentVar>
				<independentVar lookup="column">aircraft/engine/FT-degC</independentVar>
            			<tableData>
						-18	0	38
					-1000	22	21.5	21
					9000	21	21	20.5
					17500	21	20.5	20
					20100	20.5	20	19.5
					22000	20.5	19.5	19
					22500	20.5	19	18.5
					23100	20	18.5	18
					23500	19	18	17.5
					25000	18	16	15.5
            			</tableData>
      			</table>
		</product>
    </function>


<!--PRE-CALCS for Forces and Moments-->

    <function name="aircraft/wing/x_ac-ft">
      <description>wing fuselage aerodynamic centre position</description>
      <table>
	      <independentVar lookup="row">velocities/mach</independentVar>
		<tableData>
		      	0   11.01
			0.4  11.032
		</tableData>
	</table>
    </function>

    <function name="aircraft/wing/alpha-deg">
      <description>wing angle of attack</description>
	<sum>
		<property>aero/alpha-deg</property>
		<property>aircraft/wing/incidence-deg</property>
	</sum>
    </function>

    <function name="aircraft/wing/alpha-rad">
      <description>wing angle of attack</description>
	<product>
		<property>aircraft/wing/alpha-deg</property>
		<property>/extra500/const/DEG2RAD</property>
	</product>
    </function>

    <function name="aircraft/vstab/u-local-fps">
     	<sum>
             	<property>velocities/u-aero-fps</property>
		<product>					<!-- induced speed due to propeller thrust -->
			<value>0.4</value>
			<property>propulsion/engine/prop-induced-velocity_fps</property>
		</product>
	</sum>
    </function>

    <function name="aircraft/vstab/v-local-fps">
     	<sum>
     		<property>velocities/v-aero-fps</property>
     		<product>							<!-- induced speed due to rotation around the top axis -->
     			<value>-1</value>
			<property>velocities/r-aero-rad_sec</property>
			<sum>
				<property>aircraft/vstab/x_ac-ft</property>
		  		<product>
					<value>-1</value>
                  			<property>inertia/cg-x-in</property>
					<property>/extra500/const/INCH2FEET</property>
		  		</product>
                        </sum>
		</product>
                <product>							<!-- induced speed due to propeller rotation -->
                        <value>-0.03</value>
                        <property>propulsion/engine/power-hp</property>
                </product>
	</sum>
    </function>

<!--wing and fuselage coefficients-->

    <function name="aero/coefficients/cl_ac-h">
       <description>CL of aircraft less tail</description>
       <table>
            <independentVar lookup="row">aircraft/wing/alpha-deg</independentVar>
            <independentVar lookup="column">fcs/flap-aero-pos-deg</independentVar>
            <independentVar lookup="table">velocities/mach</independentVar>
            <tableData breakPoint="0">
                        0 	15 	30
                  -10   -0.543 -0.003 	0.517
                  0     0.34 	0.88 	1.4
                  10    1.223 	1.763 	2.283
                  11    1.311 	1.87  	2.371
                  11.5  1.355 	1.7   	2.42
                  12    1.4   	1.55  	1.8
                  13    1.2   	1.3   	1.6
                  14    1     	1.1   	1.2
                  15    0.8   	1     	0.9
                  16    0.7   	0.9   	0.7
                  17    0.7   	0.9   	0.5
            </tableData>
            <tableData breakPoint="0.4">
                        0 15 30
                  -10   -0.598 -0.058 0.462
                  0     0.35 0.89 1.41
                  9.5   1.251 1.791 2.311
                  10    1.298 1.838 2.358
                  10.5  1.346 1.87  2.406
                  11    1.393 1.55  2.42
                  12    1.2  1.35  1.6
                  13    1   1.15  1.3
                  14    0.8   1     1.1
                  15    0.7   0.9   0.9
                  16    0.7   0.9   0.7
              </tableData>
      </table>
    </function>

    <function name="aero/coefficients/cd_ac-h">
       <description>CD of aircraft less tail</description>
		<sum>
			<property>aircraft/wing/cd0</property>
            	<table>
                  	<independentVar lookup="row">aero/coefficients/cl_ac-h</independentVar>
                  	<tableData>
                  	-2.62  0.41
                  	-2.4   0.344
                  	-2.2   0.29
                  	-2.0   0.24
                  	-1.8   0.154
                  	-1.6   0.181
                  	-1.4   0.118
                  	-1.2   0.086
			-1.0	 0.05
                  	-0.8   0.026
                  	-0.6   0.0155
			-0.5	 0.0105
                  	-0.4   0.008
                  	-0.2   0.0015
                  	0     0
                  	0.2   0.0015
                  	0.4   0.008
			0.5	0.0105
                  	0.6   0.0155
                  	0.8   0.026
			1.0	0.05
                  	1.2   0.086
                  	1.4   0.118
                  	1.6   0.181
                  	1.8   0.154
                  	2.0   0.24
                  	2.2   0.29
                  	2.4   0.344
                  	2.62  0.41
                  	</tableData>
            	</table>
		</sum>
    </function>

    <function name="aero/coefficients/cdi_ac-h">
      <description>CDi of aircraft less tail</description>
      <sum>
            <property>aero/coefficients/cd_ac-h</property>
		<product>
            	<value>-1</value>
			<property>aircraft/wing/cd0</property>
		</product>
      </sum>
    </function>

    <function name="aero/coefficients/cd_gear">
      <description>CD of gear</description>
      <sum>
            <product> <!-- drag change due to nose landing gear -->
                  <value>0.002</value>
                  <property>/gear/gear[0]/position-norm</property>
            </product>
            <product> <!-- drag change due to left landing gear -->
                  <value>0.014</value>
                  <property>/gear/gear[1]/position-norm</property>
            </product>
            <product> <!-- drag change due to right landing gear -->
                  <value>0.014</value>
                  <property>/gear/gear[2]/position-norm</property>
            </product>
      </sum>
    </function>

    <function name="aero/coefficients/cn_wing">
    <description>wing norm coeff</description>
      <sum>
            <product>
                  <property>aero/coefficients/cl_ac-h</property>
                  <cos>
                        <property>aircraft/wing/alpha-rad</property>
                  </cos>
            </product>
            <product>
                  <sum>
                        <property>aero/coefficients/cd_ac-h</property>
                        <property>aero/coefficients/cd_gear</property>
                  </sum>
                  <sin>
                        <property>aircraft/wing/alpha-rad</property>
                  </sin>
            </product>
      </sum>
    </function>

    <function name="aero/coefficients/ct_wing">
       <description>wing tang coeff</description>
       <sum>
            <product>
                  <value>-1</value>
                  <property>aero/coefficients/cl_ac-h</property>
                  <sin>
                        <property>aircraft/wing/alpha-rad</property>
                  </sin>
            </product>
            <product>
                  <sum>
                        <property>aero/coefficients/cd_ac-h</property>
                        <property>aero/coefficients/cd_gear</property>
                  </sum>
                  <cos>
                        <property>aircraft/wing/alpha-rad</property>
                  </cos>
            </product>
       </sum>
    </function>

    <function name="aero/force/normal_wing">
       <description>wing normal force</description>
       <product>
            <property>aero/qbar-psf</property>
            <property>aircraft/wing/S-ft2</property>
            <property>aero/coefficients/cn_wing</property>
       </product>
    </function>

    <function name="aero/force/tangent_wing">
       <description>wing tangent force</description>
       <product>
           <property>aero/qbar-psf</property>
           <property>aircraft/wing/S-ft2</property>
           <property>aero/coefficients/ct_wing</property>
       </product>
    </function>

<!--moment-->

    <function name="aero/coefficients/cm_ac-h-wing">
       <description>pitching moment coeff due to wing lift in ac</description>
       <product>
            <property>aero/coefficients/cn_wing</property>
            <sum>
		  <product>
                  	<property>metrics/aero-rp-x-in</property>
			<property>/extra500/const/INCH2FEET</property>
		  </product>
                  <product>
                        <value>-1</value>
                        <property>aircraft/wing/x_ac-ft</property>
                  </product>
            </sum>
            <pow>
                  <property>aircraft/wing/c_aero-ft</property>
                  <value>-1</value>
            </pow>
       </product>
    </function>

    <function name="aero/coefficients/cm_ac-h-aoa">
       <description>Cm of aircraft less tail due to increase of aoa</description>
       <product>
            <value>-0.4</value>
            <property>aero/coefficients/cl_ac-h</property>
            <property>aircraft/wing/alpha-rad</property>
       </product>
    </function>

    <function name="aero/coefficients/cm_ac-h-drag">
       <description>moment change due to wing drag vector not in ac cg</description>
            <product>
                  <value>-0.01921</value> <!--1/c 1/inch-->
                  <sum>
                        <value>-92.8</value>
                        <property>inertia/cg-z-in</property>
                  </sum>
                  <property>aero/coefficients/cdi_ac-h</property>
            </product>
      </function>

    <function name="aero/coefficients/cm_ac-h-flap">
       <description>moment coeff due to flap deflection</description>
            <table>
                  <independentVar lookup="row">fcs/flap-pos-deg</independentVar>
                  <tableData>
                        0     -0.116
                        15    -0.226
                        30    -0.416
                  </tableData>
            </table>
     </function>

    <function name="aero/coefficients/cm_ac-h-lg">
       <description>moment change due landing gear</description>
       <sum>
            <product> <!-- moment change due to drag of nose landing gear -->
                  <value>-0.0022</value>
                  <property>/gear/gear[0]/position-norm</property>
            </product>
            <product> <!-- moment change due to drag of left landing gear -->
                  <value>-0.0154</value>
                  <property>/gear/gear[1]/position-norm</property>
            </product>
            <product> <!-- moment change due to drag of right landing gear -->
                  <value>-0.0154</value>
                  <property>/gear/gear[2]/position-norm</property>
            </product>
      </sum>
    </function>

    <function name="aero/coefficients/cm_ac-h">
       <description>total moment coeff aircraft minus tail</description>
       <sum>
            <property>aero/coefficients/cm_ac-h-aoa</property>
            <property>aero/coefficients/cm_ac-h-drag</property>
            <property>aero/coefficients/cm_ac-h-flap</property>
            <property>aero/coefficients/cm_ac-h-lg</property>
            <property>aero/coefficients/cm_ac-h-wing</property>
       </sum>
   </function>

    <function name="aero/moment/M_ac-h">
       <description>aircraft minus tail pitching moment</description>
       <product>
            <property>aero/qbar-psf</property>
            <property>aircraft/wing/S-ft2</property>
            <property>aircraft/wing/c_aero-ft</property>
            <property>aero/coefficients/cm_ac-h</property>
       </product>
    </function>


<!--horizontal stab coefficients-->

    <function name="aircraft/wing/etha-deg">
      <description>downwash angle due to wing lift</description>
      <product>
            <value>0.00574</value>
            <property>aircraft/wing/alpha-deg</property>
      </product>
      </function>

    <function name="aircraft/hstab/alpha-deg">
      <description>angle of attack at stabilizer</description>
      <sum>
            <property>aircraft/hstab/incidence-deg</property>
            <product>
                  <property>/extra500/const/RAD2DEG</property>
                  <atan2>
                        <sum>
                              <property>velocities/w-aero-fps</property>
                              <product>
                                    <property>velocities/q-aero-rad_sec</property>
                                    <sum>
                                          <property>aircraft/hstab/x_ac-ft</property>
		  			  <product>
						<value>-1</value>
                  				<property>inertia/cg-x-in</property>
						<property>/extra500/const/INCH2FEET</property>
		  			  </product>
                                    </sum>
                              </product>
                        </sum>
                        <property>velocities/u-aero-fps</property>
                  </atan2>
            </product>
            <product>
                  <value>-1</value>
                  <property>aircraft/wing/etha-deg</property>
            </product>
      </sum>
    </function>

    <function name="velocities/hstab/v-fps">
      <description>airspeed at stabilizer in xz plane</description>
      <pow>
           <sum>
                  <pow>
                        <sum>
                              <property>velocities/w-aero-fps</property>
                              <product>
                                    <property>velocities/q-aero-rad_sec</property>
                                    <sum>
                                          <property>aircraft/hstab/x_ac-ft</property>
		  			  <product>
						<value>-1</value>
                  				<property>inertia/cg-x-in</property>
						<property>/extra500/const/INCH2FEET</property>
		  			  </product>
                                    </sum>
                              </product>
                        </sum>
                        <value>2</value>
                  </pow>
                  <product>
                        <property>velocities/u-aero-fps</property>
                        <property>velocities/u-aero-fps</property>
                  </product>
            </sum>
            <value>0.5</value>
      </pow>
    </function>

    <function name="aircraft/hstab/elevator/ch_de-prad">
      <description>moment coeff around elevator hinge line due to its deflection</description>
            	<sum>
                  	<property>aircraft/hstab/elevator/Ch_de</property>
		  	<product>
                        	<property>aircraft/hstab/elevator/Ch_de2</property>
				<property>aircraft/hstab/elevator/elevator-pos-rad</property>
				<property>aircraft/hstab/elevator/elevator-pos-rad</property>
                  	</product>
            	</sum>
    </function>

    <function name="aircraft/hstab/elevator/ch_alpha-prad">
      <description>moment coeff around elevator hinge line due to local angle of attack</description>
            <sum>
                  <property>aircraft/hstab/elevator/Ch_alpha</property>
                  <product>
                        <property>aircraft/hstab/elevator/Ch_alpha2</property>
                        <abs>
				<product>
                              		<property>/extra500/const/DEG2RAD</property>
                  			<property>aircraft/hstab/alpha-deg</property>
				</product>
                        </abs>
                  </product>
            </sum>
    </function>

    <function name="aircraft/hstab/elevator/H-nz-lbsft">
      <description>static moment coeff around elevator hinge line times nz</description>
            <product>
                       <property>aircraft/hstab/elevator/H-static-lbsft</property>
                       <property>accelerations/Nz</property>  <!-- ensuring stick force per g-->
            </product>
    </function>

    <function name="aircraft/hstab/elevator/H-ds-lbsft">
      <description>moment coeff around elevator hinge line due to down spring</description>
      <sum>
            <property>aircraft/hstab/elevator/downspring0-lbsft</property>
            <product>
                       <value>-1</value>
                       <property>aircraft/hstab/elevator/downspring-lbsftprad</property>
                       <property>aircraft/hstab/elevator/elevator-pos-rad</property>
            </product>
      </sum>
    </function>

    <function name="aircraft/hstab/elevator/H-bw-lbsft">
      <description>moment coeff around elevator hinge line due to bobweight</description>
      <product>
            <property>aircraft/hstab/elevator/bobweight-lbsft</property>
            <property>accelerations/Nz</property>
      </product>
    </function>

    <function name="aircraft/hstab/elevator/H-alpha-lbsft">
      <product>
            <value>0.5</value>
            <property>atmosphere/rho-slugs_ft3</property>
            <property>velocities/hstab/v-fps</property>
            <property>velocities/hstab/v-fps</property>
            <property>aircraft/hstab/elevator/S-ft2</property>
            <property>aircraft/hstab/elevator/c_aero-ft</property>
            <property>aircraft/hstab/elevator/ch_alpha-prad</property>
            <product>
                  <property>/extra500/const/DEG2RAD</property>
                  <property>aircraft/hstab/alpha-deg</property>
            </product>
      </product>
    </function>

    <function name="aircraft/hstab/elevator/H-trim-lbsft">
      <product>
            <property>aircraft/hstab/elevator/trim/coeff-norm</property>
            <property>fcs/pitch-trim-cmd-norm</property>
            <value>0.5</value>
            <property>atmosphere/rho-slugs_ft3</property>
            <property>velocities/hstab/v-fps</property>
            <property>velocities/hstab/v-fps</property>
            <property>aircraft/hstab/elevator/trim/S-ft2</property>
            <property>aircraft/hstab/elevator/trim/c_aero-ft</property>
      </product>
    </function>

    <function name="aircraft/hstab/elevator/d_e_free-rad">
      <description>stick-free elevator deflection rad</description>
      <product>
            <value>-1</value>
            <pow>
                  <product>
                        <value>0.5</value>
                        <property>atmosphere/rho-slugs_ft3</property>
                        <property>velocities/hstab/v-fps</property>
                        <property>velocities/hstab/v-fps</property>
                        <property>aircraft/hstab/elevator/S-ft2</property>
                        <property>aircraft/hstab/elevator/c_aero-ft</property>
                        <property>aircraft/hstab/elevator/ch_de-prad</property>
                  </product>
                  <value>-1</value>
            </pow>
            <sum>
                  <property>aircraft/hstab/elevator/H-nz-lbsft</property>
                  <property>aircraft/hstab/elevator/H-ds-lbsft</property>
                  <property>aircraft/hstab/elevator/H-bw-lbsft</property>
                  <property>aircraft/hstab/elevator/H-alpha-lbsft</property>
                  <property>aircraft/hstab/elevator/H-trim-lbsft</property>
            </sum>
      </product>
    </function>

    <function name="aircraft/hstab/elevator/elevator-pos-rad">
            <sum>
                   <product>
                           <property>state/controls-fixed</property>
                           <property>fcs/elevator-pos-rad</property>
                  </product>
                  <product>
                         <abs>
                               <sum>
                                  <property>state/controls-fixed</property>
                                  <value>-1</value>
                              </sum>
                         </abs>
                         <property>aircraft/hstab/elevator/d_e_free-clipped-rad</property>
                  </product>
            </sum>
    </function>

    <function name="aircraft/hstab/elevator/elevator-pos-deg">
      <product>
            <property>aircraft/hstab/elevator/elevator-pos-rad</property>
            <property>/extra500/const/RAD2DEG</property>
      </product>
    </function>

    <function name="aircraft/hstab/elevator/H-de-lbsft">
      <product>
            <value>0.5</value>
            <property>atmosphere/rho-slugs_ft3</property>
            <property>velocities/hstab/v-fps</property>
            <property>velocities/hstab/v-fps</property>
            <property>aircraft/hstab/elevator/S-ft2</property>
            <property>aircraft/hstab/elevator/c_aero-ft</property>
            <property>aircraft/hstab/elevator/ch_de-prad</property>
            <property>aircraft/hstab/elevator/elevator-pos-rad</property>
      </product>
    </function>

    <function name="aircraft/hstab/elevator/H-total-lbsft">
      <sum>
            <property>aircraft/hstab/elevator/H-nz-lbsft</property>
            <property>aircraft/hstab/elevator/H-ds-lbsft</property>
            <property>aircraft/hstab/elevator/H-bw-lbsft</property>
            <property>aircraft/hstab/elevator/H-alpha-lbsft</property>
            <property>aircraft/hstab/elevator/H-trim-lbsft</property>
            <property>aircraft/hstab/elevator/H-de-lbsft</property>
      </sum>
    </function>

    <function name="sim-time-sec-old">
	<product>
		<value>-1</value>
		<property>sim-time-sec</property>
	</product>
    </function>


<!--end of trim part-->

    <function name="aero/coefficients/cl_hstab">
       <description>Stabilizer liftcoeff</description>
       <sum>
            <value>0.0</value>
            <table>
                  <independentVar lookup="row">aircraft/hstab/alpha-deg</independentVar>
                  <independentVar lookup="column">aircraft/hstab/elevator/elevator-pos-deg</independentVar>
                  <tableData>
        -33    		-20         -10         0           10          20
  -20   -1.1      -1.1            -1.1        -1.43354511 -0.96981937 -0.75369388
  -19   -1.1      -1.1            -1.1        -1.36186779 -0.89814192 -0.68201661
  -18   -1.1      -1.1            -1.75391638 -1.29019070 -0.82646489 -0.61033946
  -17   -2.05238581 -1.89836454     -1.68223906 -1.21851325 -0.75478756 -0.53866220
  -16   -1.98070824 -1.82668722     -1.61056185 -1.14683628 -0.68311036 -0.46698490
  -15   -1.90903115 -1.75501013     -1.53888488 -1.07515895 -0.61143321 -0.39530781
  -12.5 -1.72983789 -1.57581687     -1.35969138 -0.89596575 -0.43223998 -0.21611448
  -10   -1.55064511 -1.39662397     -1.18049824 -0.71677268 -0.25304693 -0.03692145
  -7.5  -1.37145138 -1.21743059     -1.00130498 -0.53757942 -0.07385367 0.14227186
  -5    -1.19225848 -1.03823769     -0.82211196 -0.35838634  0.10533938  0.32146487
  -2.5 -1.01306534  -0.85904449 -0.64291888 -0.17919315  0.28453258  0.50065804
   0   -0.83387232  -0.67985106 -0.46372569 0           0.46372569     0.67985106
   2.5 -0.65467900  -0.50065804 -0.28453258 0.17919315  0.64291888  0.85904449
   5   -0.47548580  -0.32146487 -0.10533938 0.35838634  0.82211196  1.03823769
   7.5 -0.29629281  -0.14227186  0.07385367 0.53757942  1.00130498  1.21743059
  10   -0.11709952  0.03692145  0.25304693 0.71677268  1.18049824  1.39662397
  12.5  0.06209352  0.21611448  0.43223998 0.89596575  1.35969138  1.57581687
  15  0.24128677  0.39530781  0.61143321  1.07515895  1.53888488   1.75501013
  16  0.31296390  0.46698490  0.68311036  1.14683628  1.61056185   1.82668722
  17  0.38464120  0.53866220  0.75478756  1.21851325  1.68223906   1.89836454
  18  0.45631850  0.61033946  0.82646489  1.29019070  1.75391638   1.1
  19  0.52799571  0.68201661  0.89814192  1.36186779  1.1          1.1
  20  0.25	      0.3  	0.5         1.43354511  1.1          1.1
  21  0.15	      0.1 	0.2		1.1	1.1	1.1

                  </tableData>
            </table>
      </sum>
    </function>

    <function name="aero/coefficients/cd_hstab">
       <description>Stabilizer dragcoeff</description>
       <sum>
            <property>aircraft/hstab/cd0</property>
            <table>
                  <independentVar lookup="row">aircraft/hstab/alpha-deg</independentVar>
                  <independentVar lookup="column">aircraft/hstab/elevator/elevator-pos-deg</independentVar>
                  <tableData>
       -33    		-20   	-10   	0     		10    20
 -20   0.31966200 0.27770889 0.22381367 0.12777638 0.05848028 0.03531977
 -19   0.29977092 0.25919092 0.20722206 0.11531816 0.05015542 0.02892133
 -18   0.28051928 0.24131195 0.19126952 0.10349887 0.04246944 0.02316171
 -17   0.26190627 0.22407174 0.17595576 0.09231845 0.03542237 0.01804101
 -16   0.24393201 0.20747052 0.16128083 0.08177685 0.02901414 0.01355918
 -15   0.22659689 0.19150814 0.14724483 0.07187422 0.02324481 0.00971625
 -12.5 0.18605386 0.15439719 0.11494987 0.04991267 0.01161657 0.00290399
 -10   0.14950392 0.12127930 0.08664804 0.03194411 0.00398135 0.00008476
 -7.5  0.11694697 0.09215446 0.06233911 0.01796855 0.00033913 0.00125854
 -5    0.08838305 0.06702262 0.04202328 0.00798603 0.00068994 0.00642532
 -2.5  0.06381207 0.04588377 0.02570042 0.00199651 0.00503375 0.01558512
   0   0.04323414 0.02873794 0.01337058 0          0.01337058  0.02873794
   2.5 0.02664924 0.01558512 0.00503375 0.00199651 0.02570042  0.04588377
   5   0.01405734 0.00642532 0.00068994 0.00798603 0.04202328  0.06702262
   7.5 0.00545846 0.00125854 0.00033913 0.01796855 0.06233911  0.09215446
  10   0.00085259 0.00008476 0.00398135 0.03194411 0.08664804  0.12127930
  12.5 0.00023973 0.00290399 0.01161657 0.04991267 0.11494987  0.15439719
  15  0.00361989  0.00971625  0.02324481  0.07187422  0.14724483  0.19150814
  16  0.00608998  0.01355918  0.02901414  0.08177685  0.16128083  0.20747052
  17  0.00919897  0.01804101  0.03542237  0.09231845  0.17595576  0.22407174
  18  0.01294685  0.02316171  0.04246944  0.10349887  0.19126952  0.24131195
  19  0.01733360  0.02892133  0.05015542  0.11531816  0.20722206  0.25919092
  20  0.02235922  0.03531977  0.05848028  0.12777638  0.22381367  0.27770889
                  </tableData>
            </table>
      </sum>
    </function>

    <function name="aero/coefficients/cn_hstab">
       <description>Stabilizer normcoeff</description>
       <sum>
            <product>
                  <property>aero/coefficients/cl_hstab</property>
                  <cos>
                        <product>
                              <property>/extra500/const/DEG2RAD</property>
                              <property>aircraft/hstab/alpha-deg</property>
                        </product>
                  </cos>
            </product>
            <product>
                  <property>aero/coefficients/cd_hstab</property>
                  <sin>
                        <product>
                              <property>/extra500/const/DEG2RAD</property>
                              <property>aircraft/hstab/alpha-deg</property>
                        </product>
                  </sin>
            </product>
      </sum>
    </function>

    <function name="aero/coefficients/ct_hstab">
       <description>Stabilizer tang coeff</description>
       <sum>
            <product>
                  <value>-1</value>
                  <property>aero/coefficients/cl_hstab</property>
                  <sin>
                        <product>
                              <property>/extra500/const/DEG2RAD</property>
                              <property>aircraft/hstab/alpha-deg</property>
                        </product>
                  </sin>
            </product>
            <product>
                  <property>aero/coefficients/cd_hstab</property>
                  <cos>
                        <product>
                              <property>/extra500/const/DEG2RAD</property>
                              <property>aircraft/hstab/alpha-deg</property>
                        </product>
                  </cos>
            </product>
      </sum>
    </function>

    <function name="aero/force/normal_hstab">
       <description>Stabilizer normal force</description>
       <product>
            <value>0.5</value>
            <property>atmosphere/rho-slugs_ft3</property>
            <property>velocities/hstab/v-fps</property>
            <property>velocities/hstab/v-fps</property>
            <property>aircraft/hstab/S-ft2</property>
            <property>aero/coefficients/cn_hstab</property>
       </product>
    </function>

    <function name="aero/force/tangent_hstab">
       <description>Stabilizer tangent force</description>
       <product>
            <value>0.5</value>
            <property>atmosphere/rho-slugs_ft3</property>
            <property>velocities/hstab/v-fps</property>
            <property>velocities/hstab/v-fps</property>
            <property>aircraft/hstab/S-ft2</property>
            <property>aero/coefficients/ct_hstab</property>
       </product>
    </function>

    <function name="aero/moment/M_hstab">
       <description>hor stab pitch moment</description>
       <sum>
            <product>
                  <property>aero/force/normal_hstab</property>
                  <sum>
		  	<product>
        			<property>metrics/aero-rp-x-in</property>
				<property>/extra500/const/INCH2FEET</property>
		  	</product>
                        <product>
                              <value>-1</value>
                              <property>aircraft/hstab/x_ac-ft</property>
                        </product>
                  </sum>
            </product>
            <product>
                  <property>aero/force/tangent_hstab</property>
                  <sum>
                        <property>aircraft/hstab/z_ac-ft</property>
		  	<product>
				<value>-1</value>
                  		<property>metrics/aero-rp-z-in</property>
				<property>/extra500/const/INCH2FEET</property>
		  	</product>
                  </sum>
            </product>
       </sum>
    </function>


<!-- VERTICAL STABILIZER -->

    <function name="aircraft/vstab/beta-stab-deg">
      <description>sideslip angle at stabilizer</description>
      <product>
      	<property>/extra500/const/RAD2DEG</property>
	<atan2>
		<property>aircraft/vstab/v-local-fps</property>
                  <pow>
                        <sum>
                              <product>
				    <property>aircraft/vstab/u-local-fps</property>
                                    <property>aircraft/vstab/u-local-fps</property>
                              </product>
                              <product>
                                    <property>velocities/w-aero-fps</property>
                                    <property>velocities/w-aero-fps</property>
                              </product>
                        </sum>
                        <value>0.5</value>
                  </pow>
            </atan2>
      </product>
    </function>

    <function name="aircraft/vstab/beta-stab-rad">
	<product>
		<property>aircraft/vstab/beta-stab-deg</property>
		<property>/extra500/const/DEG2RAD</property>
	</product>
    </function>

    <function name="velocities/vstab/v-fps">
      <description>airspeed at vert stabilizer uv</description>
      <pow>
            <sum>
                  <product>
                        <property>aircraft/vstab/v-local-fps</property>
                        <property>aircraft/vstab/v-local-fps</property>
                  </product>
                  <product>
		    <property>aircraft/vstab/u-local-fps</property>
                    <property>aircraft/vstab/u-local-fps</property>
                  </product>
            </sum>
            <value>0.5</value>
      </pow>
    </function>

    <function name="aircraft/vstab/rudder-pos-deg">
	<product>
		<property>fcs/rudder-pos-norm</property>
		<value>25</value>
	</product>
    </function>


    <function name="aero/coefficients/cn_vstab">
       <description> vertical Stabilizer liftcoeff</description>
       <sum>
            <value>0.0</value>
            <table>
                  <independentVar lookup="row">aircraft/vstab/beta-stab-deg</independentVar>
                  <independentVar lookup="column">aircraft/vstab/rudder-pos-deg</independentVar>
                  <tableData>
					-25		0		25
				-30	-0.89918226 	-1.19190836	-1.49568522
				-15	-0.30532351	-0.60069066	-0.90177768
				-5	0.13003875	-0.16740817	-0.46678135
				0	0.35264051	0.05394389	-0.24475273
				5	0.57541531	0.27532318	-0.02284279
				15	1.01202464	0.70880210	0.41129982
				30	1.60831273	1.30041099	1.00355935
                  </tableData>
            </table>
      </sum>
    </function>

    <function name="aero/coefficients/ct_vstab">
       <description> vertical Stabilizer dragcoeff</description>
       <sum>
            <property>aircraft/vstab/cd0</property>
            <table>
                  <independentVar lookup="row">aircraft/vstab/beta-stab-deg</independentVar>
                  <independentVar lookup="column">aircraft/vstab/rudder-pos-deg</independentVar>
                  <tableData>
					-25		0		25
				-30	-0.39789847 	-0.48827490	-0.55951166
				-15	-0.06797001	-0.11972034	-0.15012299
				-5	0.01582428	-0.01150106	-0.01680982
				0	0.01560545	0.00042988	0.00735503
				5	-0.01299003	-0.01590033	0.00320600
				15	-0.15552187	-0.13308850	-0.08930749
				30	-0.58021069	-0.51611918	-0.43288782
                  </tableData>
            </table>
      </sum>
    </function>

    <function name="aero/force/normal_vstab">
       <description>vert Stabilizer normal force</description>
       <product>
            <value>0.5</value>
            <property>atmosphere/rho-slugs_ft3</property>
            <property>velocities/vstab/v-fps</property>
            <property>velocities/vstab/v-fps</property>
            <property>aircraft/vstab/S-ft2</property>
            <property>aero/coefficients/cn_vstab</property>
       </product>
    </function>

    <function name="aero/force/tangent_vstab">
       <description>vert Stabilizer tangent force</description>
       <product>
            <value>0.5</value>
            <property>atmosphere/rho-slugs_ft3</property>
            <property>velocities/vstab/v-fps</property>
            <property>velocities/vstab/v-fps</property>
            <property>aircraft/vstab/S-ft2</property>
            <property>aero/coefficients/ct_vstab</property>
       </product>
    </function>


<!--START of real summation of FORCES and MOMENTS -->

<axis name="X">
	<function name="aero/force/X-total">
	<product>
		<value>-1</value>
		<sum>
			<property>aero/force/tangent_wing</property>
			<property>aero/force/tangent_hstab</property>
			<property>aero/force/tangent_vstab</property>
		</sum>
	</product>
	</function>

	<function name="aero/force/X-aileron">
	<product>
		<value>-1</value>
		<abs>
			<property>fcs/left-aileron-pos-norm</property>
		</abs>
		<property>aero/qbar-psf</property>
		<property>metrics/Sw-sqft</property>
		<value>0.00006</value>
	</product>
	</function>

</axis>

<axis name="Y">
	<function name="aero/force/Side_vstab">
		<description>Side force due to vert fin</description>
		<product>
			<property>aero/force/normal_vstab</property>
			<value>-1</value>
		</product>
</function>

</axis>

<axis name="Z">
	<function name="aero/force/Z-total">
	<product>
		<value>-1</value>
		<sum>
			<property>aero/force/normal_wing</property>
			<property>aero/force/normal_hstab</property>
		</sum>
	</product>
	</function>

</axis>

<axis name="ROLL">

	<function name="aero/moment/Roll_beta">
	<description>Roll moment due to vert fin</description>
		<product>
			<property>aero/force/Side_vstab</property>
			<sum>
				<property>aircraft/vstab/z_ac-ft</property>
		  		<product>
					<value>-1</value>
                  			<property>metrics/aero-rp-z-in</property>
					<property>/extra500/const/INCH2FEET</property>
		  		</product>
			</sum>
		</product>
	</function>

	<function name="aero/moment/Roll_damp">
	<description>Roll moment due to roll rate</description>
		<product>
			<property>aero/qbar-psf</property>
			<property>metrics/Sw-sqft</property>
			<property>metrics/bw-ft</property>
			<property>aero/bi2vel</property>
			<property>velocities/p-aero-rad_sec</property>
			<value>-0.445</value>
		</product>
	</function>

<!-- the part of the vertical tail is accounted for, wing-fus part is missing -->
			<!--function name="aero/moment/Roll_yaw">
				<description>Roll moment due to yaw rate</description>
				<product>
					<property>aero/qbar-psf</property>
					<property>metrics/Sw-sqft</property>
					<property>metrics/bw-ft</property>
					<property>aero/bi2vel</property>
					<property>velocities/r-aero-rad_sec</property>
					<value>0.15</value>
				</product>
			</function-->

	<function name="aero/moment/Roll_aileron">
	<description>Roll moment due to aileron</description>
		<product>
			<property>aero/qbar-psf</property>
			<property>metrics/Sw-sqft</property>
			<property>metrics/bw-ft</property>
			<property>fcs/left-aileron-pos-norm</property>
			<value>0.0277</value>
		</product>
	</function>

</axis>

<axis name="PITCH">
	<function name="aero/moment/M-total">
		<sum>
			<property>aero/moment/M_ac-h</property>
			<property>aero/moment/M_hstab</property>
		</sum>
	</function>

	<function name="aero/moment/M_beta">
	<description>Pitch moment due to vert fin</description>
		<product>
			<property>aero/force/tangent_vstab</property>
			<sum>
				<property>aircraft/vstab/z_ac-ft</property>
		  		<product>
					<value>-1</value>
                  			<property>metrics/aero-rp-z-in</property>
					<property>/extra500/const/INCH2FEET</property>
		  		</product>
			</sum>
		</product>
	</function>

</axis>

<axis name="YAW">

	<function name="aero/moment/Yaw_beta">
	<description>Yaw moment due to beta</description>
		<product>
           		<value>0.5</value>
            		<property>atmosphere/rho-slugs_ft3</property>
            		<property>velocities/vstab/v-fps</property>
            		<property>velocities/vstab/v-fps</property>
            		<property>aircraft/wing/S-ft2</property>
			<property>aircraft/wing/b-ft</property>
			<property>aircraft/vstab/beta-stab-rad</property>
			<sum>
				<value>-0.01134</value> 		<!-- fuselage -->
				<value>-0.0124</value> 			<!-- prop -->
				<product> 				<!-- wing -->
					<value>0.023</value>
					<property>aero/coefficients/cl_ac-h</property>
					<property>aero/coefficients/cl_ac-h</property>
				</product>
			</sum>
		</product>
	</function>

	<function name="aero/moment/N_beta">
	<description>yaw moment due to vert fin</description>
		<product>
			<property>aero/force/normal_vstab</property>
			<sum>
				<property>aircraft/vstab/x_ac-ft</property>
		  		<product>
					<value>-1</value>
                  			<property>metrics/aero-rp-x-in</property>
					<property>/extra500/const/INCH2FEET</property>
		  		</product>
			</sum>
		</product>
	</function>

	<function name="aero/moment/Yaw_aileron">
	<description>Adverse yaw</description>
		<product>
			<property>aero/qbar-psf</property>
			<property>metrics/Sw-sqft</property>
			<property>fcs/left-aileron-pos-rad</property>
			<value>0.00254375</value>
		</product>
	</function>

</axis>

</aerodynamics>

	<external_reactions>
	</external_reactions>

</fdm_config>
